# Построить график функции f(x) с шагом dX для промежутка от x1 до x2
f(x) := sin(π*x)*sqrt(|x|)
x1 := -6
x2 := 6
dX := 0.01
# Задаем область отображения графика в окне
xx := 0 .. 10
Xlw := 100
Ylw := 200  # - координаты левого верхнего угла
Xhw := 800
Yhw := 900  # - координаты правого нижнего угла
# Вычисляем число точек графика
N := round((x2 - x1)/dX) = 1200
# Заполняем массивы X, Y, Z значениями xi, yi = f(xi) и 1 соответственно в МСК
i := 0 .. N
X[i] := x1 + i*dX
Y[i] := f(X[i])
Z[i] := 1  # - x, y - координаты точек графика в МСК
# Определяем область графика в МСК
Xl := min(X) = -6
Yh := max(Y) = 2.34618  # - левый верхний угол в МСК
Xh := max(X) = 6
Yl := min(Y) = -2.34618  # - правый нижний угол в МСК
# Формируем матрицу координат точек графика в МСК
M := stack(transpose(X), transpose(Y), transpose(Z))
# Вычисляем параметры, необходимые для формирования матрицы пересчета координат из МСК в ОСК
dXw := Xhw - Xlw = 700
dx := Xh - Xl = 12
dYw := Yhw - Ylw = 700
dy := Yh - Yl = 4.69236
kx := dXw/dx = 58.3333
ky := dYw/dy = 149.179
# Формируем матрица пересчетов из МСК в ОСК
Tsw := [kx, 0, Xlw - kx*Xl; 0, -ky, Yhw + ky*Yl; 0, 0, 1]
# Вычисляем матрицу координат точек графика в ОСК
Mw := Tsw*M
# Из матрицы М выбираем (х,у) - координаты точек графика для отображения
Xw := transpose(Mw)[:, 0]
Yw := transpose(Mw)[:, 1]
Mw =  # no stored result
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# В мировой СК
# В оконной СК
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